R := 2*10^2
L := 1*10^-3
C := 5*10^-9
x := 1
1/R*(d/dt(y)) + y/L + C*d^2/dt^2(y) → 1000*y
x/L + C*d^2/dt^2(x) → 1000
y := [1; 1]
D(t, y) := [1/(L*C) - 1/C*(1/R*y[1] + 1/L*y[0]); y[1]]
Z := rkfixed(y, 0, 5, 400, D)  # error: This function cannot be used here.
