# нулевой шаг
p0 := 0.4 + 0.25 + 0.2 + 0.1 + 0.05 = 1
# первый шаг
p01 := 0.4
p11 := 0.25
p21 := 0.2
p31 := 0.1
p41 := 0.05
p1 := p01 + p11 + p21 + p31 + p41 = 1
# второй шаг
p02 := p01*0.4 = 0.16
p12 := p01*0.25 + p11*0.35 = 0.1875
p22 := p01*0.2 + p11*0.3 + p21*0.45 = 0.245
p32 := p01*0.1 + p11*0.25 + p21*0.4 + p31*0.4 = 0.2225
p42 := p01*0.05 + p11*0.1 + p21*0.15 + p31*0.6 + p41*1 = 0.185
p2 := p02 + p12 + p22 + p32 + p42 = 1
# третий шаг
p03 := p02*0.4 = 0.064
p13 := p02*0.25 + p12*0.35 = 0.105625
p23 := p02*0.2 + p12*0.3 + p22*0.45 = 0.1985
p33 := p02*0.1 + p21*0.25 + p22*0.4 + p32*0.4 = 0.253
p43 := p02*0.05 + p12*0.1 + p22*0.15 + p32*0.6 + p42*1 = 0.382
p3 := p03 + p13 + p23 + p33 + p43 = 1.00313
